K_R_BT.601 := 0.299
K_R_BT.709 := 0.2126
K_R_BT.2020 := 0.2627
K_B_BT.601 := 0.114
K_B_BT.709 := 0.0722
K_B_BT.2020 := 0.0593
Y(R, G, B, K_R, K_B) := K_R*R + (1 - K_R - K_B)*G + K_B*B
U(R, G, B, K_R, K_B) := 1/2*(B - Y(R, G, B, K_R, K_B))/(1 - K_B) + 128 → 128 - (B + G*(K_B + K_R - 1) - B*K_B - K_R*R)/(2*(K_B - 1))
V(R, G, B, K_R, K_B) := 1/2*(R - Y(R, G, B, K_R, K_B))/(1 - K_R) + 128 → 128 - (R + G*(K_B + K_R - 1) - B*K_B - K_R*R)/(2*(K_R - 1))
# BT.601:
Y(R, G, B, K_R_BT.601, K_B_BT.601) → 0.114*B + 0.587*G + 0.299*R
U(R, G, B, K_R_BT.601, K_B_BT.601) → -0.16873589*R + 0.5*B + (-0.33126411*G) + 128
V(R, G, B, K_R_BT.601, K_B_BT.601) → -0.41868759*G + 0.5*R + (-0.08131241*B) + 128
Y(R, G, B, K_R_BT.709, K_B_BT.709) → 0.2126*R + 0.0722*B + 0.7152*G
U(R, G, B, K_R_BT.709, K_B_BT.709) → -0.38542789*G + (-0.11457211*R) + 0.5*B + 128
V(R, G, B, K_R_BT.709, K_B_BT.709) → -0.45415291*G + 0.5*R + (-0.04584709*B) + 128
Y(R, G, B, K_R_BT.2020, K_B_BT.2020) → 0.0593*B + 0.2627*R + 0.678*G
U(R, G, B, K_R_BT.2020, K_B_BT.2020) → -0.36036994*G + 0.5*B + (-0.13963006*R) + 128
V(R, G, B, K_R_BT.2020, K_B_BT.2020) → -0.4597857*G + 0.5*R + (-0.0402143*B) + 128
